OpenVSP model (file version 5), 5 components.
Geometry view with OpenVSP parameter names; values to 6 digits, angles in degrees, lengths in the model's unit.
Overall bounding box: X_Min=0 X_Len=75.0403 Y_Min=-50 Y_Len=100 Z_Min=-2.5 Z_Len=12.5

Fuselage "FuselageGeom"
  location (X Y Z) 0 0 0, rotation 0 0 0
  bounding box size 75 6 5
  mass: Density=0.0018 Shell_Flag=0 Mass_Area=1 Mass_Prior=0
  Design: Length=75
  cross sections:
    n  XLocPercent  YLocPercent  ZLocPercent  shape
    0  0            0            0            point
    1  0.120902     0            0            edit curve Width=6 Height=5 AbsoluteFlag=0 SymType=0 linear points (X Y): 0.5 0, 0.5 -0.5, 0 -0.5, -0.5 -0.5, -0.5 0, -0.5 0.5, 0 0.5, 0.5 0.5, 0.5 0
    2  0.267725     0            0            rounded rectangle RoundRectXSec_Radius=1 RoundedRect_Height=5 RoundedRect_Width=6
    3  0.405225     0            0            as above
    4  0.5          0            0            circle Circle_Diameter=2
    5  0.625        0            0            as above
    6  0.75         0            0            as above
    7  0.875        0            0            as above
    8  0.9375       0            0            as above
    9  1            0            0            point

Wing "WingGeom"
  location (X Y Z) 21.5 0 1.6, rotation 0 0 0
  symmetric about XZ
  bounding box size 10.003 100 1.23174
  mass: Density=4.35e-05 Shell_Flag=0 Mass_Area=1 Mass_Prior=0
  totals: TotalSpan=100 TotalProjectedSpan=100 TotalChord=7.25 TotalArea=725 TotalAR=13.7931 MAC=7.5977
  root: chord 10, twist 0, NACA 4-series Camber=0.036 CamberLoc=0.362857 ThickChord=0.117857
  sections:
    n  Span  Root_Chord  Tip_Chord  Area   Sweep  Sweep_Location  Dihedral  Twist  Twist_Location  tip airfoil
    1  50    10          4.5        362.5  0      0               0         0      0.25            NACA 4-series Camber=0.0398571 CamberLoc=0.4 ThickChord=0.121429

Wing "Horizontal Tail"
  location (X Y Z) 67 0 0, rotation 0 0 0
  symmetric about XZ
  bounding box size 8.04026 20 0.971856
  mass: Density=0.0049 Shell_Flag=0 Mass_Area=1 Mass_Prior=0
  totals: TotalSpan=20 TotalProjectedSpan=20 TotalChord=6 TotalArea=120 TotalAR=3.33333 MAC=6.22222
  root: chord 8, twist 0, NACA 4-series Camber=0 CamberLoc=0.2 ThickChord=0.121429
  sections:
    n  Span  Root_Chord  Tip_Chord  Area  Sweep  Sweep_Location  Dihedral  Twist  Twist_Location  tip airfoil
    1  10    8           4          60    22     0               0         0      0.25            NACA 4-series Camber=0 CamberLoc=0.2 ThickChord=0.1

Wing "Vertical Tail"
  location (X Y Z) 67 0 0, rotation 90 0 0
  symmetric about XZ
  bounding box size 8 0.971856 10
  mass: Density=0.0049 Shell_Flag=0 Mass_Area=1 Mass_Prior=0
  totals: TotalSpan=20 TotalProjectedSpan=20 TotalChord=6 TotalArea=120 TotalAR=3.33333 MAC=6.22222
  root: chord 8, twist 0, NACA 4-series Camber=0 CamberLoc=0.2 ThickChord=0.121429
  sections:
    n  Span  Root_Chord  Tip_Chord  Area  Sweep  Sweep_Location  Dihedral  Twist  Twist_Location  tip airfoil
    1  10    8           4          60    21.8   0               0         0      0.25            NACA 4-series Camber=0 CamberLoc=0.2 ThickChord=0.1

Mesh "MeshGeom"
  location (X Y Z) 0 0 0, rotation 0 0 0

VSPAERO settings: Sref=725 bref=100 cref=7.25 Xcg=18.9324 Ycg=0 Zcg=2.32527 AlphaStart=-5 AlphaEnd=15 AlphaNpts=10 BetaStart=-5 BetaEnd=5 BetaNpts=10 MachStart=0.05 MachEnd=0 MachNpts=1 ReCref=1e+07 Vinf=100 Rho=0.002377
